# [area: Definiciones graficos]
# LAS ÁREAS AMARILLAS DIFIEREN RESPECTO A LA VERSIÓN ANALÓGICA
fmin := 10  # Mínima frecuencia para la que se hará el cálculo, en Hz
fmax := 1*10^6  # Máxima frecuencia para la que se hará el cálculo en Hz
# GENERACIÓN DEL VECTOR DE FRECUENCIAS QUE SE USARÁ EN LAS GRÁFICAS
# Definición de colores | Títulos (255,255,0)
Npoints := 1000  # Número de puntos
# Datos de entrada (200,255,200)
i := 0 .. Npoints
# Comentarios (128,255,128)
# Fórmulas (255,223,191)
Frec[i] := fmin*e^(i/Npoints*ln(fmax/fmin))  # Vector de frecuencias
# Datos calculados (191,223,255)
# Dudas y sugerencias (255,191,255)
# Datos transitorio:
fmaxtr := 2.067*10^5
ntrans := 2.048*10^3
nPtosTrans := 4094
delta := 10^-3
# Input stage
R309 := 100000
R304 := 100000
C243 := 820*10^-12
Zeq(s) := R309/(1 + R309*s*C243)
G_input(Vin, s) := Vin*Zeq(s)/(Zeq(s) + R304) simplify → 500000*Vin/(41*s + 1000000)
V_OA(Vin, s) := G_input(Vin, s) simplify → 500000*Vin/(41*s + 1000000)
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20*log(|G_input(1, 2*π*10)|) = -6.04295
# Current buffer
Vprog := 12
Rext := 75000
Iext := Vprog/Rext = 0.00016  # => Iout max = 0.3A
Ioutmax := 0.3
Vinmax := 3
G_buffer := Ioutmax/Vinmax = 0.1  # Gbuffer = Iout/Vin [A/V]
R306 := 10000
Cin := 3.5*10^-12
fp := 1/(2*π*R306*Cin)
H_buffer(s) := G_buffer*1/(1 + s/(2*π*fp)) simplify → 2857142.85714/(s + 28571428.5714)
H_buffer(2*π*1) = 0.1  # Gbuffer @low freq =0.1 A/V = -20dB
Iout(Vb, s) := H_buffer(s)*Vb simplify → 2.85714285714e19*Vb/(1e13*s + 2.85714285714e20)
Iout(3, 1) = 0.3  # Iout=3V*0.1A/V = 0.3A
H2_buffer(Vb, s) := H_buffer(s)*Vb
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20*log(|H_buffer(2*π*1j*20)|) = -20
# Differential amplifier and sensing resistor gain
R313 := 1200
R314 := 2000
Requivalent := 25  # 4 parallel resistors of 100ohm=> Req=25ohm
Vdif(Iout) := Iout*Requivalent
H_difAmp(Iout, s) := 25*1.6*Iout*1/(1 + s/(2*π*168.75*10^6)) simplify → 4e31*Iout/(9.43140403508e20*s + 1e30)
aux(1, 1) → aux(1, 1)
H_difAmp(1, 2*π*10) = 40
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20*log(|H_difAmp(1, 2*π*1)|) = 32.0412
20*log(|H_difAmp(1, 2*π*1j*10)|) = 32.0412
# As V+ = V- due to virtual shortcircuit theorem:
I_out(Vin, s) := 500000*Vin*(3.375*10^8*π + s)/((41*s + 1000000)*1.35*10^10) simplify → Vin*(50000000000*s + 5.30143760293e19)/(5.535e16*s + 1.35e21)
I_out(5, 10) → 0.196269072382
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# open loop
OPA_OLGain := 3.16*10^7
H_difAmp(Iout, s)  # Differential amplifier
H2_buffer(Vb, s)
T(s) := OPA_OLGain*H_difAmp(1, s)*H2_buffer(1, s) simplify → 3.82915264578e24/((s + 28571428.5714)*(s + 1060287520.59))
T(1) = 126399995
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# closed loop
G(Vin, s) := 2*OPA_OLGain*H2_buffer(1, s)/(1 + OPA_OLGain*H2_buffer(1, s)*H_difAmp(1, s))*G_input(Vin, s) simplify → Vin*(8.51521050024e51*s + 9.02857142857e60)/(3.86687565438e33*s^3 + 4.21057647559e42*s^2 + 1.48068572601e58*s + 3.6114286e62)
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|20*log(G(1, 2*π*1j*10))| = 32.0412
